// SBML level 3 version 1

function KL_45760(Ki, A)
  NaN;
end

function KL_45063(M, Km, Vmax, A, E)
  Vmax*A/(Km + A);
end

function KL_45755(A, Ki)
  NaN;
end

function KL_29660(S, I, Ki, E)
  NaN;
end

function KL_29954(A, Kd_a, Kd_b, B)
  NaN;
end

function KL_29955(C, B, Kd_c, A, Kd_b)
  NaN;
end

function KL_26691(Ka, A, E, kcat, Km, S)
  NaN;
end

function KL_21459(A, Ki, B)
  NaN;
end

function KL_21467(Ki, B, A)
  NaN;
end

function KL_21475(B, A, Ki)
  NaN;
end

function KL_49606()
  NaN;
end

function KL_49609()
  NaN;
end

function KL_49615()
  NaN;
end

function KL_49616()
  NaN;
end

function KL_49617()
  NaN;
end

function KL_49618()
  NaN;
end

function KL_7107(kcat, A, Km)
  NaN;
end

function KL_26277(KmB, B, A, KmA)
  NaN;
end

function KL_26278(KmB, B, A, KmA)
  NaN;
end

function KL_26279(B, KmB, KmA, A)
  NaN;
end

function KL_26284(KmA, A, B, KmB)
  NaN;
end

function KL_26785(E, Kd, A)
  NaN;
end

function KL_26786(A, Kd, E)
  NaN;
end

function KL_26787(E, Kd, A)
  NaN;
end

function KL_26788(A, Kd, E)
  NaN;
end

function KL_27601(Act, A, C, I, B)
  NaN;
end

model SABIOmdl31May2014158()
  // This model has been created with the help of the SABIO-RK Database (http://sabio.h-its.org/) (c) 2005-2014 HITS gGmbH http://www.h-its.org
  // To cite SABIO-RK Database, please use "http://www.ncbi.nlm.nih.gov/pubmed/22102587"
  // SABIO-RK - database for biochemical reaction kinetics. Wittig U, Kania R, Golebiewski M, Rey M, Shi L, Jong L, Algaa E, Weidemann A, Sauer-Danzwith H, Mir S, Krebs O, Bittkowski M, Wetsch E, Rojas I, Mueller W. Nucleic Acids Res. 2012;40(Database issue)790-6

  // Compartments:
  compartment compart_Cell;
  compartment compart_cytosol;

  // Species:
  species SPC_40_Cell in compart_Cell = 1; SPC_40_Cell is "H2O";  // CHEBI:15377 kegg.compound:C00001
  species SPC_1338_Cell in compart_Cell = 1; SPC_1338_Cell is "5,10-Methenyltetrahydrofolate";  // CHEBI:15638 kegg.compound:C00445
  species SPC_1318_Cell in compart_Cell = 1; SPC_1318_Cell is "10-Formyltetrahydrofolate";  // CHEBI:15637 kegg.compound:C00234
  species ENZ_259697_Cell in compart_Cell = 1; ENZ_259697_Cell is "methenyltetrahydrofolate cyclohydrolase(Enzyme) wildtype";
  species SPC_2063_Cell in compart_Cell = 1; SPC_2063_Cell is "Folate";  // CHEBI:27470 kegg.compound:C00504
  species SPC_73_Cell in compart_Cell = 1; SPC_73_Cell is "L-Glutamate";  // CHEBI:16015 CHEBI:29972 CHEBI:29985 CHEBI:29988
  species SPC_9686_Cell in compart_Cell = 1; SPC_9686_Cell is "Pteroic acid";  // CHEBI:27623 CHEBI:37055 CHEBI:38794 kegg.compound:C07582
  species ENZ_255742_Cell in compart_Cell = 1; ENZ_255742_Cell is "glutamate carboxypeptidase(Enzyme) wildtype";  // uniprot:P06621
  species SPC_1281_Cell in compart_Cell = 1; SPC_1281_Cell is "Zn2+";  // CHEBI:29105 kegg.compound:C00038
  species SPC_1308_Cell in compart_Cell = 1; SPC_1308_Cell is "5,10-Methylenetetrahydrofolate";  // CHEBI:1989 CHEBI:12071 CHEBI:15636 kegg.compound:C00143
  species SPC_1263_Cell in compart_Cell = 1; SPC_1263_Cell is "NADP+";  // CHEBI:18009 CHEBI:25523 CHEBI:44409 kegg.compound:C00006
  species SPC_39_Cell in compart_Cell = 1; SPC_39_Cell is "H+";  // CHEBI:15378 kegg.compound:C00080
  species SPC_1262_Cell in compart_Cell = 1; SPC_1262_Cell is "NADPH";  // CHEBI:16474 kegg.compound:C00005
  species ENZ_259671_Cell in compart_Cell = 1; ENZ_259671_Cell is "methylenetetrahydrofolate dehydrogenase (NADP+)(Enzyme) wildtype";
  species SPC_37_Cell in compart_Cell = 1; SPC_37_Cell is "NAD+";  // CHEBI:13389 CHEBI:15846 CHEBI:44215 kegg.compound:C00003
  species SPC_38_Cell in compart_Cell = 1; SPC_38_Cell is "NADH";  // CHEBI:16908 kegg.compound:C00004
  species ENZ_167809_Cell in compart_Cell = 1; ENZ_167809_Cell is "methylenetetrahydrofolate dehydrogenase (NAD+)(Enzyme) wildtype";  // uniprot:P13995
  species ENZ_169498_Cell in compart_Cell = 1; ENZ_169498_Cell is "methylenetetrahydrofolate dehydrogenase (NADP+)(Enzyme) wildtype";
  species SPC_6654_Cell in compart_Cell = 1; SPC_6654_Cell is "5-Formyltetrahydrofolate";  // CHEBI:15640 kegg.compound:C03479
  species ENZ_169504_Cell in compart_Cell = 1; ENZ_169504_Cell is "methenyltetrahydrofolate cyclohydrolase(Enzyme) wildtype";
  species SPC_5324_Cell in compart_Cell = 1; SPC_5324_Cell is "Porphobilinogen";  // CHEBI:17381 kegg.compound:C00931
  species SPC_1268_Cell in compart_Cell = 1; SPC_1268_Cell is "NH3";  // CHEBI:16134 kegg.compound:C00014
  species SPC_5362_Cell in compart_Cell = 1; SPC_5362_Cell is "Hydroxymethylbilane";  // CHEBI:16645 kegg.compound:C01024
  species ENZ_150762_Cell in compart_Cell = 1; ENZ_150762_Cell is "hydroxymethylbilane synthase(Enzyme) wildtype";  // uniprot:P19356
  species SPC_1336_Cell in compart_Cell = 1; SPC_1336_Cell is "Dihydrofolate";  // CHEBI:15633 kegg.compound:C00415
  species SPC_1297_Cell in compart_Cell = 1; SPC_1297_Cell is "5,6,7,8-Tetrahydrofolate";  // CHEBI:15635 CHEBI:20506 CHEBI:26911 kegg.compound:C00101
  species ENZ_113242_Cell in compart_Cell = 1; ENZ_113242_Cell is "dihydrofolate reductase(Enzyme) wildtype";  // uniprot:P00375
  species ENZ_282149_Cell in compart_Cell = 1; ENZ_282149_Cell is "dihydrofolate reductase(Enzyme) wildtype dhfr";
  species ENZ_282168_Cell in compart_Cell = 1; ENZ_282168_Cell is "dihydrofolate reductase(Enzyme) mutant D26N";
  species ENZ_282205_Cell in compart_Cell = 1; ENZ_282205_Cell is "dihydrofolate reductase(Enzyme) wildtype";
  species ENZ_282211_Cell in compart_Cell = 1; ENZ_282211_Cell is "dihydrofolate reductase(Enzyme) wildtype";
  species ENZ_282217_Cell in compart_Cell = 1; ENZ_282217_Cell is "dihydrofolate reductase(Enzyme) mutant D26N";
  species ENZ_282223_Cell in compart_Cell = 1; ENZ_282223_Cell is "dihydrofolate reductase(Enzyme) mutant D26N";
  species ENZ_142647_Cell in compart_Cell = 1; ENZ_142647_Cell is "dihydrofolate reductase(Enzyme) wildtype";  // uniprot:P00376
  species ENZ_148374_Cell in compart_Cell = 1; ENZ_148374_Cell is "dihydrofolate reductase(Enzyme) wildtype";  // uniprot:P00375
  species ENZ_148380_Cell in compart_Cell = 1; ENZ_148380_Cell is "dihydrofolate reductase(Enzyme) wildtype";  // uniprot:P00375
  species ENZ_148386_Cell in compart_Cell = 1; ENZ_148386_Cell is "dihydrofolate reductase(Enzyme) wildtype";  // uniprot:P00375
  species ENZ_148416_Cell in compart_Cell = 1; ENZ_148416_Cell is "dihydrofolate reductase(Enzyme) wildtype";  // uniprot:P00375
  species ENZ_151298_Cell in compart_Cell = 1; ENZ_151298_Cell is "dihydrofolate reductase(Enzyme) wildtype";  // uniprot:P0ABQ4
  species ENZ_151304_Cell in compart_Cell = 1; ENZ_151304_Cell is "dihydrofolate reductase(Enzyme) mutant G95A";  // uniprot:P0ABQ4
  species ENZ_151310_Cell in compart_Cell = 1; ENZ_151310_Cell is "dihydrofolate reductase(Enzyme) wildtype";  // uniprot:P0ABQ4
  species ENZ_151316_Cell in compart_Cell = 1; ENZ_151316_Cell is "dihydrofolate reductase(Enzyme) mutant G95A";  // uniprot:P0ABQ4
  species SPC_1928_cytosol in compart_cytosol = 1; SPC_1928_cytosol is "Formaldehyde";  // CHEBI:16842 kegg.compound:C00067
  species SPC_37_cytosol in compart_cytosol = 1; SPC_37_cytosol is "NAD+";  // CHEBI:13389 CHEBI:15846 CHEBI:44215 kegg.compound:C00003
  species SPC_1926_cytosol in compart_cytosol = 1; SPC_1926_cytosol is "Reduced glutathione";  // CHEBI:16856 kegg.compound:C00051
  species SPC_38_cytosol in compart_cytosol = 1; SPC_38_cytosol is "NADH";  // CHEBI:16908 kegg.compound:C00004
  species SPC_39_cytosol in compart_cytosol = 1; SPC_39_cytosol is "H+";  // CHEBI:15378 kegg.compound:C00080
  species SPC_2220_cytosol in compart_cytosol = 1; SPC_2220_cytosol is "S-Formylglutathione";  // CHEBI:16225 kegg.compound:C01031
  species ENZ_155990_cytosol in compart_cytosol = 1; ENZ_155990_cytosol is "S-(hydroxymethyl)glutathione dehydrogenase(Enzyme) wildtype";  // uniprot:P12711
  species SPC_2063_cytosol in compart_cytosol = 1; SPC_2063_cytosol is "Folate";  // CHEBI:27470 kegg.compound:C00504

  // Reactions:
  REAC_0: SPC_40_Cell + SPC_1338_Cell -> SPC_1318_Cell; KL_45760(REAC_0_Ki_SPC_2063_Cell, SPC_1338_Cell);  // modifiers: ENZ_259697_Cell, SPC_2063_Cell; isVersionOf ec-code:3.5.4.9; kegg.reaction:R01655; hasTaxon taxonomy:9823; sabiork.reaction:74
    REAC_0_Ki_SPC_2063_Cell = 0.00014 M;
  REAC_1: SPC_40_Cell + SPC_2063_Cell -> SPC_73_Cell + SPC_9686_Cell; KL_45063(SPC_1281_Cell, REAC_1_Km_SPC_2063_Cell, Vmax, SPC_2063_Cell, ENZ_255742_Cell);  // modifiers: ENZ_255742_Cell, SPC_1281_Cell; isVersionOf ec-code:3.4.17.11; hasTaxon taxonomy:306; sabiork.reaction:12929
    REAC_1_Km_SPC_2063_Cell = 4e-6 M;
  REAC_2: SPC_1308_Cell + SPC_1263_Cell -> SPC_39_Cell + SPC_1262_Cell + SPC_1338_Cell; KL_45755(SPC_1263_Cell, REAC_2_Ki_SPC_2063_Cell);  // modifiers: ENZ_259671_Cell, SPC_2063_Cell; isVersionOf ec-code:1.5.1.5; hasTaxon taxonomy:9823; sabiork.reaction:73
    REAC_2_Ki_SPC_2063_Cell = 0.00025 M;
  REAC_3: SPC_1308_Cell + SPC_37_Cell -> SPC_38_Cell + SPC_39_Cell + SPC_1338_Cell; KL_29660(SPC_1308_Cell, SPC_2063_Cell, REAC_3_Ki_SPC_2063_Cell, ENZ_167809_Cell);  // modifiers: ENZ_167809_Cell, SPC_2063_Cell; isVersionOf ec-code:1.5.1.15; hasTaxon taxonomy:9606; sabiork.reaction:1450
    REAC_3_Ki_SPC_2063_Cell = 5e-5 M;
  REAC_4: SPC_1308_Cell + SPC_1263_Cell -> SPC_1338_Cell + SPC_1262_Cell + SPC_39_Cell; KL_29954(SPC_1263_Cell, Kd_a_SPC_1263_Cell, Kd_b_SPC_2063_Cell, SPC_2063_Cell);  // modifiers: ENZ_169498_Cell, SPC_2063_Cell; isVersionOf ec-code:1.5.1.5; hasTaxon taxonomy:9823; sabiork.reaction:73
    Kd_a_SPC_1263_Cell = 4e-6 M; Kd_b_SPC_2063_Cell = 2.5e-5 M;
  REAC_5: SPC_40_Cell + SPC_1338_Cell -> SPC_6654_Cell; KL_29955(SPC_2063_Cell, SPC_1263_Cell, Kd_c_SPC_2063_Cell, SPC_1338_Cell, Kd_b_SPC_1263_Cell);  // modifiers: SPC_2063_Cell, ENZ_169504_Cell, SPC_1263_Cell; isVersionOf ec-code:3.5.4.9; kegg.reaction:R02300; hasTaxon taxonomy:9823; sabiork.reaction:2262
    Kd_c_SPC_2063_Cell = 2.5e-5 M; Kd_b_SPC_1263_Cell = 4e-6 M;
  REAC_6: SPC_40_Cell + 4 SPC_5324_Cell -> 4 SPC_1268_Cell + SPC_5362_Cell; KL_26691(Ka_SPC_2063_Cell, SPC_2063_Cell, ENZ_150762_Cell, REAC_6_kcat, Km_SPC_5324_Cell, SPC_5324_Cell);  // modifiers: ENZ_150762_Cell, SPC_2063_Cell; isVersionOf ec-code:2.5.1.61; kegg.reaction:R00084; hasTaxon taxonomy:10116; sabiork.reaction:669
    Ka_SPC_2063_Cell = 0.00166 M; Km_SPC_5324_Cell = 1.2e-5 M;
  REAC_8: SPC_39_Cell + SPC_1336_Cell + SPC_1262_Cell -> SPC_1263_Cell + SPC_1297_Cell; KL_21467(REAC_8_Ki_SPC_2063_Cell, SPC_1336_Cell, SPC_1262_Cell);  // modifiers: ENZ_113242_Cell, SPC_2063_Cell; isVersionOf ec-code:1.5.1.3; kegg.reaction:R00939; hasTaxon taxonomy:10090; sabiork.reaction:100
    REAC_8_Ki_SPC_2063_Cell = 2e-8 M;
  REAC_10: 2 SPC_39_Cell + SPC_2063_Cell + 2 SPC_1262_Cell -> SPC_1297_Cell + 2 SPC_1263_Cell; KL_49606();  // modifiers: ENZ_282149_Cell; isVersionOf ec-code:1.5.1.3; kegg.reaction:R00940; hasTaxon taxonomy:1582; sabiork.reaction:1256
  REAC_11: SPC_2063_Cell + 2 SPC_1262_Cell + 2 SPC_39_Cell -> 2 SPC_1263_Cell + SPC_1297_Cell; KL_49609();  // modifiers: ENZ_282168_Cell; isVersionOf ec-code:1.5.1.3; kegg.reaction:R00940; hasTaxon taxonomy:1582; sabiork.reaction:1256
  REAC_12: 2 SPC_39_Cell + SPC_2063_Cell + 2 SPC_1262_Cell -> 2 SPC_1263_Cell + SPC_1297_Cell; KL_49615();  // modifiers: ENZ_282205_Cell; isVersionOf ec-code:1.5.1.3; kegg.reaction:R00940; hasTaxon taxonomy:1582; sabiork.reaction:1256
  REAC_13: 2 SPC_1262_Cell + 2 SPC_39_Cell + SPC_2063_Cell -> 2 SPC_1263_Cell + SPC_1297_Cell; KL_49616();  // modifiers: ENZ_282211_Cell; isVersionOf ec-code:1.5.1.3; kegg.reaction:R00940; hasTaxon taxonomy:1582; sabiork.reaction:1256
  REAC_14: 2 SPC_39_Cell + 2 SPC_1262_Cell + SPC_2063_Cell -> SPC_1297_Cell + 2 SPC_1263_Cell; KL_49617();  // modifiers: ENZ_282217_Cell; isVersionOf ec-code:1.5.1.3; kegg.reaction:R00940; hasTaxon taxonomy:1582; sabiork.reaction:1256
  REAC_15: 2 SPC_39_Cell + SPC_2063_Cell + 2 SPC_1262_Cell -> SPC_1297_Cell + 2 SPC_1263_Cell; KL_49618();  // modifiers: ENZ_282223_Cell; isVersionOf ec-code:1.5.1.3; kegg.reaction:R00940; hasTaxon taxonomy:1582; sabiork.reaction:1256
  REAC_16: SPC_39_Cell + SPC_1262_Cell + SPC_2063_Cell -> SPC_1263_Cell + SPC_1336_Cell; KL_7107(REAC_16_kcat, SPC_1262_Cell, REAC_16_Km_SPC_2063_Cell);  // modifiers: ENZ_142647_Cell; isVersionOf ec-code:1.5.1.3; kegg.reaction:R02236; hasTaxon taxonomy:9913; sabiork.reaction:2207
    REAC_16_kcat = 0.15 swedgeone; REAC_16_Km_SPC_2063_Cell = 4.28e-6 M;
  REAC_17: SPC_2063_Cell + 2 SPC_39_Cell + 2 SPC_1262_Cell -> 2 SPC_1263_Cell + SPC_1297_Cell; KL_26277(REAC_17_KmB_SPC_2063_Cell, SPC_2063_Cell, SPC_1262_Cell, REAC_17_KmA_SPC_1262_Cell);  // modifiers: ENZ_148374_Cell; isVersionOf ec-code:1.5.1.3; kegg.reaction:R00940; hasTaxon taxonomy:10090; sabiork.reaction:1256
    REAC_17_KmB_SPC_2063_Cell = 2e-6 M; REAC_17_KmA_SPC_1262_Cell = 8e-6 M;
  REAC_18: SPC_2063_Cell + 2 SPC_1262_Cell + 2 SPC_39_Cell -> SPC_1297_Cell + 2 SPC_1263_Cell; KL_26278(REAC_18_KmB_SPC_2063_Cell, SPC_2063_Cell, SPC_1262_Cell, REAC_18_KmA_SPC_1262_Cell);  // modifiers: ENZ_148380_Cell; isVersionOf ec-code:1.5.1.3; kegg.reaction:R00940; hasTaxon taxonomy:10090; sabiork.reaction:1256
    REAC_18_KmB_SPC_2063_Cell = 2e-6 M; REAC_18_KmA_SPC_1262_Cell = 3.3e-5 M;
  REAC_19: 2 SPC_1262_Cell + 2 SPC_39_Cell + SPC_2063_Cell -> 2 SPC_1263_Cell + SPC_1297_Cell; KL_26279(SPC_2063_Cell, REAC_19_KmB_SPC_2063_Cell, REAC_19_KmA_SPC_1262_Cell, SPC_1262_Cell);  // modifiers: ENZ_148386_Cell; isVersionOf ec-code:1.5.1.3; kegg.reaction:R00940; hasTaxon taxonomy:10090; sabiork.reaction:1256
    REAC_19_KmB_SPC_2063_Cell = 2e-6 M; REAC_19_KmA_SPC_1262_Cell = 3.3e-5 M;
  REAC_20: 2 SPC_39_Cell + 2 SPC_1262_Cell + SPC_2063_Cell -> SPC_1297_Cell + 2 SPC_1263_Cell; KL_26284(REAC_20_KmA_SPC_1262_Cell, SPC_1262_Cell, SPC_2063_Cell, REAC_20_KmB_SPC_2063_Cell);  // modifiers: ENZ_148416_Cell; isVersionOf ec-code:1.5.1.3; kegg.reaction:R00940; hasTaxon taxonomy:10090; sabiork.reaction:1256
    REAC_20_KmA_SPC_1262_Cell = 6e-5 M; REAC_20_KmB_SPC_2063_Cell = 2e-6 M;
  REAC_21: 2 SPC_1263_Cell + SPC_1297_Cell -> SPC_2063_Cell + 2 SPC_39_Cell + 2 SPC_1262_Cell; KL_26785(ENZ_151298_Cell, REAC_21_Kd_SPC_1263_Cell, SPC_1263_Cell);  // modifiers: ENZ_151298_Cell; isVersionOf ec-code:1.5.1.3; kegg.reaction:R00940; hasTaxon taxonomy:562; sabiork.reaction:1256
    REAC_21_Kd_SPC_1263_Cell = 7e-6 M;
  REAC_22: SPC_1297_Cell + 2 SPC_1263_Cell -> 2 SPC_39_Cell + SPC_2063_Cell + 2 SPC_1262_Cell; KL_26786(SPC_1263_Cell, REAC_22_Kd_SPC_1263_Cell, ENZ_151304_Cell);  // modifiers: ENZ_151304_Cell; isVersionOf ec-code:1.5.1.3; kegg.reaction:R00940; hasTaxon taxonomy:562; sabiork.reaction:1256
    REAC_22_Kd_SPC_1263_Cell = 0.00073 M;
  REAC_23: 2 SPC_1262_Cell + 2 SPC_39_Cell + SPC_2063_Cell -> 2 SPC_1263_Cell + SPC_1297_Cell; KL_26787(ENZ_151310_Cell, REAC_23_Kd_SPC_2063_Cell, SPC_2063_Cell);  // modifiers: ENZ_151310_Cell; isVersionOf ec-code:1.5.1.3; kegg.reaction:R00940; hasTaxon taxonomy:562; sabiork.reaction:1256
    REAC_23_Kd_SPC_2063_Cell = 3e-6 M;
  REAC_24: 2 SPC_1262_Cell + 2 SPC_39_Cell + SPC_2063_Cell -> 2 SPC_1263_Cell + SPC_1297_Cell; KL_26788(SPC_2063_Cell, REAC_24_Kd_SPC_2063_Cell, ENZ_151316_Cell);  // modifiers: ENZ_151316_Cell; isVersionOf ec-code:1.5.1.3; kegg.reaction:R00940; hasTaxon taxonomy:562; sabiork.reaction:1256
    REAC_24_Kd_SPC_2063_Cell = 1.77e-5 M;
  REAC_25: SPC_1928_cytosol + SPC_37_cytosol + SPC_1926_cytosol -> SPC_38_cytosol + SPC_39_cytosol + SPC_2220_cytosol; KL_27601(Act, SPC_37_cytosol, SPC_1928_cytosol, SPC_2063_cytosol, SPC_1926_cytosol);  // modifiers: ENZ_155990_cytosol, SPC_2063_cytosol; isVersionOf ec-code:1.1.1.284; hasTaxon taxonomy:10116; sabiork.reaction:161
    Act = 0 katgwedgeone;

  // Unit definitions:
  unit M = mole / litre;
  unit swedgeone = 1 / second; swedgeone is "s^(-1)";
  unit katgwedgeone = katal / gram; katgwedgeone is "katal*g^(-1)";
end
